// COMSOL Multiphysics 6.0.0.318 model "wedge.mph"
// Outline of the model tree

Geometry
  geom1 "几何 1" (2D, length unit mm)
    r1: Rectangle "矩形 1" | pos = {5, 2}; base = center; size = {16, 2}
    pol1: Polygon "多边形 1" | source = table; table = {{5, 8+6}, {4, 12+6}, {6, 12+6}}
    sq1: Square "正方形 1" | pos = {-5, 0}; size = 20
    uni1: Union "并集 1" | input = pol1, r1, sq1
    imp1: Import "导入 1"
    fin: Finalize "形成联合体"

Materials
  mat1: Common "材料 1" on domains 1-3
    def "基本"
      relpermittivity = 1

Physics
  es: Electrostatics "静电" on all domains
    dependent variable V
    ccn1: ChargeConservation "电荷守恒 1" (default) | materialType = from_mat
    zc1: ZeroCharge "零电荷 1" (default)
    init1: init "初始值 1" (default) | V = 0
    scd1: SpaceChargeDensity "空间电荷密度 1" on domains 3 | rhoq = 0.0001
    gnd1: Ground "接地 1" on boundaries 1-3, 11
    scd2: SpaceChargeDensity "空间电荷密度 2" on domains 2 | rhoq = -0.0001

Mesh
  mesh1 "网格 1" (physics-controlled)
    size: MeshSizeDefault "大小" | hauto = 1

Studies
  std1 "研究 1"
    stat: Stationary "稳态"

Solver configurations
  sol1 "解 1" (study std1)
    v1: Variables "因变量 1"
    s1: Stationary "稳态求解器 1"
      dDef: Direct "直接"
      fc1: FullyCoupled "全耦合 1" | linsolver = dDef

Datasets
  dset1: Solution | solution = sol1

Plots
  pg1: PlotGroup2D "电势 (es)" | data = dset1
    surf1: Surface "表面 1" | expr = V
    str1: Streamline "流线 1" on boundaries 6, 7, 9 | expr = {es.Ex, es.Ey}; udist = 0.02
      col1: Color "颜色表达式 1" | expr = V
      filt1: Filter "过滤器 1" | expr = !isScalingSystemDomain
    con1: Contour "等值线 1" | expr = V
  pg2: PlotGroup2D "电场模 (es)" | data = dset1
    surf1: Surface "表面 1" | expr = es.normE
    str1: Streamline "流线 1" on boundaries 6, 7, 9 | expr = {es.Ex, es.Ey}; udist = 0.02
      col1: Color "颜色表达式 1" | expr = es.normE
      filt1: Filter "过滤器 1" | expr = !isScalingSystemDomain

Exports
  img1: Image "图像 1" | size = manualweb; unit = px; width = 640; height = 480
  img2: Image "图像 2"
    size = manualweb
    unit = mm
    width = 100
    height = 100
    pngfilename = C:\Users\Administrator\Downloads\Untitled.png
    addsuffix = off
  img3: Image "图像 3"
    size = manualweb
    unit = mm
    width = 50
    height = 50
    pngfilename = C:\Users\Administrator\Downloads\Untitled.png